# OpenSim document version 30000
Model ball_pin_double_pendulum:
  credits: Conlain Kelly
  publications: For testing
  length_units: meters
  force_units: N
  gravity: 0 -9.80665 0
  BodySet:
    Body ground: mass=0 mass_center=(0 0 0) inertia_xx=0 inertia_yy=0 inertia_zz=0 meshes=Unassigned
    Body rod1: mass=1 mass_center=(0 0 0) inertia_xx=1 inertia_yy=1 inertia_zz=1 meshes=(cylinder.vtp sphere.vtp)
      BallJoint pin1: parent_body=ground location_in_parent=(-2 2 0) orientation_in_parent=(1 2 3) location=(0 0.5 -7)
          orientation=(0.7853982 1.54 .22)
        Coordinate q1: motion_type=rotational default_value=0.7853982 range=(-1.570796 1.570796) clamped=false
        Coordinate q2: motion_type=rotational default_value=-0.7853982 range=(-1.570796 1.570796) clamped=false
        Coordinate q3: motion_type=rotational default_value=2 range=(-1.570796 1.570796) clamped=false
    Body rod2: mass=1 mass_center=(0 0 0) inertia_xx=1 inertia_yy=1 inertia_zz=1 meshes=(cylinder.vtp sphere.vtp)
      PinJoint pin2: parent_body=rod1 location_in_parent=(0 0 0) location=(0 0.5 0)
        Coordinate q2: motion_type=rotational default_value=-1.047198 range=(-1.570796 1.570796) clamped=false
  MarkerSet:
    Marker body1: rod1 (0 0 0)
    Marker body2: rod2 (0 0 0)
