# OpenSim document version 30000
Model spline_me:
  credits: Conlain Kelly
  publications: For testing
  length_units: meters
  force_units: N
  gravity: 0 -9.80665 0
  BodySet:
    Body ground: mass=0 mass_center=(0 0 0) inertia_xx=0 inertia_yy=0 inertia_zz=0 meshes=Unassigned
    Body rod: mass=1 mass_center=(0 0 0) inertia_xx=1 inertia_yy=1 inertia_zz=1 meshes=(cylinder.vtp sphere.vtp)
      CustomJoint pin1: parent_body=ground location_in_parent=(0 0 0) location=(0 .5 0)
        Coordinate q1: motion_type=rotational default_value=1.35 range=(-1.54 1.54) clamped=false
        SpatialTransform: axes_held_at_zero=(rotation2 rotation3 translation1 translation2 translation3)
          TransformAxis rotation1: coordinates=q1 axis=(1 0 0)
            SimmSpline f11: x=(0 0.174533 0.349066 0.523599 0.698132 0.872665 1.0472 1.22173 1.39626 1.5708 1.74533 1.91986 2.0944)
                y=(0.00113686 -0.00629212 -0.105582 -0.253683 -0.414245 -0.579047 -0.747244 -0.91799 -1.09044 -1.26379 -1.43763 -1.61186 -1.78634)
  MarkerSet:
    Marker body1: rod (0 0 0)
